OpenVSP model (file version 5), 11 components.
Geometry view with OpenVSP parameter names; values to 6 digits, angles in degrees, lengths in the model's unit.
Overall bounding box: X_Min=0 X_Len=16.26 Y_Min=-8.75104 Y_Len=17.5021 Z_Min=-0.921562 Z_Len=3.73495

Fuselage "MainBody"
  location (X Y Z) 0 0 0, rotation 0 0 0
  bounding box size 16.26 1.86267 2.24925
  Design: Length=16.26
  cross sections:
    n  XLocPercent  YLocPercent  ZLocPercent  shape
    0  0            0            0            point
    1  0.314516     0            0.0244297    edit curve Width=1.41892 Height=1.86092 AbsoluteFlag=0 SymType=0 cubic Bezier points (X Y): 0.5 0, 0.5 -0.275958, 0.275958 -0.5, 0 -0.5, -0.275958 -0.5, -0.5 -0.275958, -0.5 0, -0.5 0.275958, -0.275958 0.5, 0 0.5, 0.275958 0.5, 0.5 0.275958, 0.5 0
    2  0.5          0            0.0193548    ellipse Ellipse_Height=1.54595 Ellipse_Width=1.86267
    3  0.75         0            0.014        ellipse Ellipse_Height=1.13432 Ellipse_Width=1.08108
    4  0.875        0            0.013        ellipse Ellipse_Height=0.93324 Ellipse_Width=0.820216
    5  0.958065     0            0.01         ellipse Ellipse_Height=0.772973 Ellipse_Width=0.698052
    6  1            0            0            point

Pod "PodGeom", child of "MainBody"
  location (X Y Z) 2.38095 0 0.9, rotation 0 1.90476 0
  bounding box size 4.66409 1.1245 1.18592
  Design: FineRatio=8.3 Length=4.66667

Custom "engine", child of "MainBody"
  location (X Y Z) 11.4286 1.42857 1.19048, rotation 0 3.33333 0
  symmetric about XZ
  bounding box size 3.28483 4.60771 1.797
  Design: Camber=0 CamberLoc=0.2 Chord=3.20904 Height=1.37587 InvertFlag=0 Shape=0 ThickChord=0.116667 Width=1.376
  custom script Duct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

Custom "Engine front plate", child of "engine"
  location (X Y Z) 10.414 1.42 1.24, rotation 0 0 0
  symmetric about XZ
  bounding box size 0 4.216 1.376
  Design: Diameter=1.376
  custom script Disk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

Custom "engine cone", child of "Engine front plate"
  location (X Y Z) 10.7 1.42 1.24, rotation -180 0 -180; relative location 10.7 1.42 1.24, rotation 0 180 0
  symmetric about XZ
  bounding box size 0.8 3.64 0.8
  Design: Diameter=0.8 Height=0.8
  custom script Cone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

Custom "engine back plate", child of "Engine front plate"
  location (X Y Z) 12.5569 1.42 1.12, rotation 0 0 0
  symmetric about XZ
  bounding box size 0 4.216 1.376
  Design: Diameter=1.376
  custom script Disk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

Wing "engine - body connecter", child of "MainBody"
  location (X Y Z) 10.1087 0 0.543478, rotation 20 0 0
  symmetric about XZ
  bounding box size 3.64583 1.91863 0.590657
  totals: TotalSpan=1.97917 TotalProjectedSpan=1.97917 TotalChord=2.68229 TotalArea=5.30871 TotalAR=0.737865
  root: chord 3.64583, twist 0, NACA 4-series Camber=0 CamberLoc=0.2 ThickChord=0.1
  sections:
    n  Span      Root_Chord  Tip_Chord  Area     Sweep  Sweep_Location  Dihedral  Twist  Twist_Location  tip airfoil
    1  0.989584  3.64583     1.71875    2.65435  30     0               0         0      0.25            as above

Wing "Mainwing Body"
  location (X Y Z) 6.73913 0.108696 -0.27, rotation 0 0 0
  symmetric about XZ
  bounding box size 3.11749 5.75906 0.30975
  totals: TotalSpan=5.54167 TotalProjectedSpan=5.54167 TotalChord=3.08228 TotalArea=17.0809 TotalAR=1.79791
  root: chord 3.0957, twist 0, NACA 4-series Camber=0 CamberLoc=0.2 ThickChord=0.1
  sections:
    n  Span     Root_Chord  Tip_Chord  Area     Sweep    Sweep_Location  Dihedral  Twist  Twist_Location  tip airfoil
    1  2.77083  3.0957      3.06885    8.54047  1.00568  0               0         0      0.25            as above
  SS_Control "SS_CONT_0": UStart=0.371951 UEnd=0.682927 Length_C_Start=0.25 Length_C_End=0.25 Length_Start=0.773148 Length_End=0.767212 LE_Flag=0 Surf_Type=2

Wing "Mainwing tip", child of "Mainwing Body"
  location (X Y Z) 6.78 2.82609 -0.27, rotation 4.78261 0 0
  symmetric about XZ
  bounding box size 3.0625 17.5021 0.744835
  totals: TotalSpan=11.875 TotalProjectedSpan=11.875 TotalChord=2.50521 TotalArea=29.7494 TotalAR=4.74013
  root: chord 3.0625, twist 0, NACA 4-series Camber=0 CamberLoc=0.2 ThickChord=0.1
  sections:
    n  Span    Root_Chord  Tip_Chord  Area     Sweep    Sweep_Location  Dihedral  Twist  Twist_Location  tip airfoil
    1  5.9375  3.0625      1.94792    14.8747  5.60795  0               0         0      0.25            as above
  SS_Control "SS_CONT_0": UStart=0.335366 UEnd=0.6 Length_C_Start=0.25 Length_C_End=0.25 Length_Start=0.763926 Length_End=0.542708 LE_Flag=0 Surf_Type=2

Wing "Tailwing horizontal"
  location (X Y Z) 13.9674 0.108696 0.434783, rotation 0 0 0
  symmetric about XZ
  bounding box size 1.82292 5.75906 0.182397
  totals: TotalSpan=5.54167 TotalProjectedSpan=5.54167 TotalChord=1.79948 TotalArea=9.97212 TotalAR=3.0796
  root: chord 1.82292, twist 0, NACA 4-series Camber=0 CamberLoc=0.2 ThickChord=0.1
  sections:
    n  Span     Root_Chord  Tip_Chord  Area     Sweep     Sweep_Location  Dihedral  Twist  Twist_Location  tip airfoil
    1  2.77083  1.82292     1.77604    4.98606  0.545455  0               0         0      0.25            as above
  SS_Control "SS_CONT_0": UStart=0.323171 UEnd=0.75 Length_C_Start=0.408537 Length_C_End=0.408537 Length_Start=0.744728 Length_End=0.725578 LE_Flag=0 Surf_Type=2

Wing "tailwing vertical", child of "Tailwing horizontal"
  location (X Y Z) 13.96 2.88 0.326087, rotation 90 0 0
  symmetric about XZ
  bounding box size 1.82981 5.94309 2.48731
  totals: TotalSpan=4.97461 TotalProjectedSpan=4.97461 TotalChord=1.44274 TotalArea=7.17705 TotalAR=3.44804
  root: chord 1.82981, twist 0, NACA 4-series Camber=0 CamberLoc=0.2 ThickChord=0.1
  sections:
    n  Span     Root_Chord  Tip_Chord  Area     Sweep    Sweep_Location  Dihedral  Twist  Twist_Location  tip airfoil
    1  2.48731  1.82981     1.05566    3.58852  12.9716  0               0         0      0.25            as above
  SS_Control "SS_CONT_0": UStart=0.329268 UEnd=0.664634 Length_C_Start=0.31247 Length_C_End=0.539201 Length_Start=0.57176 Length_End=0.57176 LE_Flag=0 Surf_Type=2
