OpenVSP model (file version 5), 17 components.
Geometry view with OpenVSP parameter names; values to 6 digits, angles in degrees, lengths in the model's unit.
Overall bounding box: X_Min=-21.1957 X_Len=100 Y_Min=-78.5675 Y_Len=157.135 Z_Min=-15.8721 Z_Len=24.5468

Fuselage "Fairing"
  location (X Y Z) 0 0 0, rotation 0 0 0
  bounding box size 16.5455 5.05932 5.05955
  Design: Length=16.5455
  cross sections:
    n  XLocPercent  YLocPercent  ZLocPercent  shape
    0  0            0            0            point
    1  0.272391     0            0            edit curve Width=4.6 Height=4.6 AbsoluteFlag=0 SymType=1 cubic Bezier points (X Y): 0.5 0, 0.5 -0.276142, 0.276142 -0.5, 0 -0.5, -0.276142 -0.5, -0.5 -0.276142, -0.5 0, -0.5 0.276142, -0.276142 0.5, 0 0.5, 0.276142 0.5, 0.5 0.276142, 0.5 0
    2  0.584213     0            0            edit curve Width=5 Height=5 AbsoluteFlag=1 SymType=1 cubic Bezier points (X Y): 0.5 0, 0.5 -0.276142, 0.276142 -0.5, 0 -0.5, -0.276142 -0.5, -0.5 -0.276142, -0.5 0, -0.5 0.276142, -0.276142 0.5, 0 0.5, 0.276142 0.5, 0.5 0.276142, 0.5 0
    3  0.898313     0            0            edit curve Width=5 Height=5 AbsoluteFlag=0 SymType=1 cubic Bezier points (X Y): 0.5 0, 0.5 -0.276142, 0.276142 -0.5, 0 -0.5, -0.276142 -0.5, -0.5 -0.276142, -0.5 0, -0.5 0.276142, -0.276142 0.5, 0 0.5, 0.276142 0.5, 0.5 0.276142, 0.5 0
    4  1            0            0            edit curve Width=4.5 Height=4.5 AbsoluteFlag=0 SymType=1 cubic Bezier points (X Y): 0.5 0, 0.5 -0.276142, 0.276142 -0.5, 0 -0.5, -0.276142 -0.5, -0.5 -0.276142, -0.5 0, -0.5 0.276142, -0.276142 0.5, 0 0.5, 0.276142 0.5, 0.5 0.276142, 0.5 0

Fuselage "Core", child of "Fairing"
  location (X Y Z) 15.5435 0 0, rotation 0 0 0
  bounding box size 30 4.5 4.5
  Design: Length=30
  cross sections:
    n  XLocPercent  YLocPercent  ZLocPercent  shape
    0  0            0            0            point
    1  0.0416153    0            0            edit curve Width=4.5 Height=4.5 AbsoluteFlag=0 SymType=1 cubic Bezier points (X Y): 0.5 0, 0.5 -0.276142, 0.276142 -0.5, 0 -0.5, -0.276142 -0.5, -0.5 -0.276142, -0.5 0, -0.5 0.276142, -0.276142 0.5, 0 0.5, 0.276142 0.5, 0.5 0.276142, 0.5 0
    2  0.374363     0            0            as above
    3  0.710983     0            0            as above
    4  1            0            0            edit curve Width=4.2 Height=4.2 AbsoluteFlag=0 SymType=1 linear points (X Y): 0.5 0, 0.45411 -0.470548, 0 -0.5, -0.45411 -0.470548, -0.5 0, -0.462329 0.458219, 0 0.5, 0.462329 0.458219, 0.5 0

Fuselage "Exhaust", child of "Core"
  location (X Y Z) 45.1087 0 0, rotation 0 0 0
  bounding box size 6.15455 4.2 4.2
  Design: Length=5.45455
  cross sections:
    n  XLocPercent  YLocPercent  ZLocPercent  shape
    0  0            0            0            point
    1  0            0            0            edit curve Width=4.2 Height=4.2 AbsoluteFlag=0 SymType=1 linear points (X Y): 0.5 0, 0.453318 -0.445667, 0 -0.5, -0.453318 -0.445667, -0.5 0, -0.460969 0.453318, 0 0.5, 0.460969 0.453318, 0.5 0
    2  0.472522     0            0            edit curve Width=4.1 Height=4.1 AbsoluteFlag=0 SymType=1 linear points (X Y): 0.5 0, 0.453318 -0.445667, 0 -0.5, -0.453318 -0.445667, -0.5 0, -0.460969 0.453318, 0 0.5, 0.460969 0.453318, 0.5 0
    3  0.716194     0            0            edit curve Width=3.8 Height=3 AbsoluteFlag=0 SymType=1 linear points (X Y): 0.5 0, 0.453318 -0.445667, 0 -0.5, -0.453318 -0.445667, -0.5 0, -0.460969 0.453318, 0 0.5, 0.460969 0.453318, 0.5 0
    4  1            0            0            edit curve Width=2.5 Height=1.3 AbsoluteFlag=0 SymType=1 linear points (X Y): 0.5 0, 0.453318 -0.445667, 0 -0.5, -0.453318 -0.445667, -0.5 0, -0.460969 0.453318, 0 0.5, 0.460969 0.453318, 0.5 0

Wing "main wing"
  location (X Y Z) 25 1.95652 0, rotation 0 0 0
  symmetric about XZ
  bounding box size 13.6265 11.913 1
  totals: TotalSpan=8 TotalProjectedSpan=8 TotalChord=7.2502 TotalArea=58.0016 TotalAR=1.10342
  root: chord 13.6265, twist 0, ellipse Ellipse_Height=1 Ellipse_Width=13.6265
  sections:
    n  Span  Root_Chord  Tip_Chord  Area     Sweep  Sweep_Location  Dihedral  Twist  Twist_Location  tip airfoil
    1  4     13.6265     0.873935   29.0008  30     0               0         0      0.25            ellipse DeltaX=10.5 Ellipse_Height=0.2 Ellipse_Width=0.873935

Wing "strake", child of "main wing"
  location (X Y Z) 17.8261 0 2.17391, rotation 90 0 0
  symmetric about XY
  bounding box size 4.48886 0.449147 5.94783
  totals: TotalSpan=1.6 TotalProjectedSpan=1.6 TotalChord=2.74443 TotalArea=4.39109 TotalAR=0.582999
  root: chord 4.48886, twist 0, NACA 4-series Camber=0 CamberLoc=0.2 ThickChord=0.1
  sections:
    n  Span  Root_Chord  Tip_Chord  Area     Sweep  Sweep_Location  Dihedral  Twist  Twist_Location  tip airfoil
    1  0.8   4.48886     1          2.19554  60     0               0         0      0.25            NACA 4-series Camber=0 CamberLoc=0.2 DeltaX=2 ThickChord=0.1

Wing "Ventral fins"
  location (X Y Z) 44.7609 1.84783 0, rotation 0 0 0
  symmetric about XZ
  bounding box size 6.72917 6.09565 0.673307
  totals: TotalSpan=2.4 TotalProjectedSpan=2.4 TotalChord=4.59635 TotalArea=11.0312 TotalAR=0.522153
  root: chord 6.72917, twist 0, NACA 4-series Camber=0 CamberLoc=0.2 DeltaX=-0.376623 ThickChord=0.1
  sections:
    n  Span  Root_Chord  Tip_Chord  Area     Sweep  Sweep_Location  Dihedral  Twist  Twist_Location  tip airfoil
    1  1.2   6.72917     2.46354    5.51562  30     0               0         0      0.25            NACA 4-series Camber=0 CamberLoc=0.2 DeltaX=-0.354545 ThickChord=0.1

Wing "Ventral fins", child of "Ventral fins"
  location (X Y Z) 43.4565 0 1.91304, rotation 90 0 0
  symmetric about XY
  bounding box size 6.72917 0.673307 6.62609
  totals: TotalSpan=2.8 TotalProjectedSpan=2.8 TotalChord=4.59635 TotalArea=12.8698 TotalAR=0.609178
  root: chord 6.72917, twist 0, NACA 4-series Camber=0 CamberLoc=0.2 DeltaX=-0.376623 ThickChord=0.1
  sections:
    n  Span  Root_Chord  Tip_Chord  Area    Sweep  Sweep_Location  Dihedral  Twist  Twist_Location  tip airfoil
    1  1.4   6.72917     2.46354    6.4349  30     0               0         0      0.25            NACA 4-series Camber=0 CamberLoc=0.2 DeltaX=-0.354545 ThickChord=0.1

Fuselage "Fuselage"
  location (X Y Z) -21.1957 0 -10.0637, rotation 0 0 0
  bounding box size 100 10.8661 10.3935
  Design: Length=100
  cross sections:
    n  XLocPercent  YLocPercent  ZLocPercent   shape
    0  0            0            0.0139857     point
    1  0.1639       0            -0.00421659   edit curve Width=9.54545 Height=9.54545 AbsoluteFlag=0 SymType=1 linear points (X Y): 0.499315 -0.15, 0.339041 -0.178767, 0.265068 -0.302055, 0.215753 -0.491096, 0 -0.5, -0.215753 -0.491096, -0.265068 -0.302055, -0.339041 -0.178767, -0.499315 -0.15, -0.441705 0.234301, -0.384247 0.433562, -0.281507 0.495205, 0 0.5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
    2  0.5          0            0             edit curve Width=9.54545 Height=9.54545 AbsoluteFlag=0 SymType=1 linear points (X Y): 0.569178 -0.162329, 0.339041 -0.178767, 0.265068 -0.302055, 0.223973 -0.519863, 0 -0.540411, -0.223973 -0.519863, -0.265068 -0.302055, -0.339041 -0.178767, -0.569178 -0.162329, -0.491096 0.256849, -0.425342 0.388356, -0.318493 0.507534, 0 0.5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
    3  0.727291     0            -0.000680095  edit curve Width=9.54545 Height=9.54545 AbsoluteFlag=0 SymType=1 linear points (X Y): 0.499315 -0.15, 0.339041 -0.178767, 0.265068 -0.302055, 0.215753 -0.491096, 0 -0.5, -0.215753 -0.491096, -0.265068 -0.302055, -0.339041 -0.178767, -0.499315 -0.15, -0.441705 0.234301, -0.384247 0.433562, -0.281507 0.495205, 0 0.5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
    4  0.884623     0            0.000761925   edit curve Width=9.54545 Height=9.54545 AbsoluteFlag=0 SymType=1 linear points (X Y): 0.45 0.00205479, 0.25274 -0.104795, 0.186986 -0.24863, 0.129452 -0.376027, 0 -0.400685, -0.129452 -0.376027, -0.186986 -0.24863, -0.25274 -0.104795, -0.45 0.00205479, -0.441781 0.15411, -0.413014 0.285616, -0.306164 0.371918, 0 0.384247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
    5  1            0            -0.000686442  circle Circle_Diameter=5.69892

Wing "Main Wing"
  location (X Y Z) 4.5 0 -15.5435, rotation 0 0 0
  symmetric about XZ
  bounding box size 55.3487 156.524 15.3069
  totals: TotalSpan=165.276 TotalProjectedSpan=156.524 TotalChord=16.6828 TotalArea=3382.64 TotalAR=7.24275
  root: chord 39.8097, twist 0, NACA 4-series Camber=0.0454091 CamberLoc=0.616364 DeltaY=0.0363636 ThickChord=0.1
  sections:
    n  Span     Root_Chord  Tip_Chord  Area     Sweep    Sweep_Location  Dihedral  Twist     Twist_Location  tip airfoil
    1  30.1205  39.8097     20.5719    909.361  32.2     0               8.42866   0.181818  0               NACA 4-series Camber=0 CamberLoc=0.5 ThickChord=0.122727
    2  41.4564  20.5719     11.5624    666.086  28.0182  0               7.92865   0         0               NACA 4-series Camber=0.035 CamberLoc=0.5 ThickChord=0.1
    3  7.21159  11.5624     10.4845    79.4965  28       0               10.4097   -1.27273  0               as above
    4  3.84942  10.4845     8.41536    36.3767  21.3636  0               85.3261   -1.09091  0               NACA 4-series Camber=0 CamberLoc=0.5 ThickChord=0.1

Wing "Main Wing", child of "Main Wing"
  location (X Y Z) 47.413 0 4.45652, rotation 0 0 0; relative location 42.913 0 20, rotation 0 0 0
  symmetric about XZ
  bounding box size 19.6097 156.532 9.24485
  totals: TotalSpan=156.843 TotalProjectedSpan=156.532 TotalChord=13.9705 TotalArea=2345.92 TotalAR=10.4447
  root: chord 19, twist 0.412371, NACA 4-series Camber=0.0454091 CamberLoc=0.616364 DeltaX=0.218182 DeltaY=0.136364 ThickChord=0.1
  sections:
    n  Span     Root_Chord  Tip_Chord  Area     Sweep    Sweep_Location  Dihedral  Twist     Twist_Location  tip airfoil
    1  23.1413  19          18         428.114  2.8      0               -2.42866  0         0               NACA 4-series Camber=0.043 CamberLoc=0.5 DeltaX=0.163636 DeltaY=0.0727273 ThickChord=0.1
    2  48.0189  18          10.2082    677.264  1.36364  0               -3.92865  0         0               NACA 4-series Camber=0.035 CamberLoc=0.5 DeltaX=0.136364 ThickChord=0.1
    3  7.26114  10.2082     8.40632    67.5815  10       0               -4.40968  -1.63636  0               NACA 4-series Camber=0.0343636 CamberLoc=0.503636 ThickChord=0.1

Fuselage "Engine"
  location (X Y Z) -0.735427 3.95526 -13.3446, rotation 0 0 0
  symmetric about XZ
  bounding box size 29.2924 12.5343 4.61165
  Design: Length=28.9887
  cross sections:
    n  XLocPercent  YLocPercent  ZLocPercent  shape
    0  0            0            0            point
    1  0            0            0            edit curve Width=2.95699 Height=2.95699 AbsoluteFlag=0 SymType=0 linear points (X Y): 0.5 0, 0.44589 -0.786986, -0.00205479 -0.778767, -0.644506 -0.539011, -0.5 0, -0.511644 0.470548, -0.00616438 0.503425, 0.355479 0.499315, 0.5 0
    2  0.929487     0            0            rounded rectangle RoundRectXSec_Radius=0.2 RoundRect_Skew=0.27957 RoundedRect_Height=2.95699 RoundedRect_Width=2.95699
    3  1            -0.121465    0            point

Fuselage "Wing root"
  location (X Y Z) -4.12406 0 -14.586, rotation 0 0 0
  bounding box size 61.3138 10.2562 3.25168
  Design: Length=61.3138
  cross sections:
    n  XLocPercent  YLocPercent  ZLocPercent  shape
    0  0            0            0            point
    1  0.198718     0            -0.0128205   rounded rectangle RoundRectXSec_Radius=0 RoundedRect_Height=1 RoundedRect_Width=10.2562
    2  0.5          0            0            as above
    3  0.807692     0            0            rounded rectangle RoundRectXSec_Radius=0 RoundedRect_Height=1 RoundedRect_Width=7.03035
    4  1            0            0.0128205    point

Pod "Pylon inboard"
  location (X Y Z) 23.2857 29.3458 -11.5238, rotation 0 -1.19048 0
  symmetric about XZ
  bounding box size 20.8288 61.6156 3.09648
  Design: FineRatio=14.25 Length=20.8333

Pod "Pylon(tail"
  location (X Y Z) 51.759 23.0952 5.33333, rotation 0 1.66667 -0.47619
  symmetric about XZ
  bounding box size 17.492 48.0767 2.17521
  Design: FineRatio=18 Length=17.5

Pod "Pylon (outboard)"
  location (X Y Z) 51 78.0952 0, rotation 0 1.66667 0
  symmetric about XZ
  bounding box size 8.4964 157.135 1.05641
  Design: FineRatio=18 Length=8.5

Wing "Vertical Stabilizers"
  location (X Y Z) 23.913 30 -10.6522, rotation 113.478 -0.326087 -1.63043
  symmetric about XZ
  bounding box size 45.6843 60.8272 16.6319
  totals: TotalSpan=36.512 TotalProjectedSpan=36.512 TotalChord=18.459 TotalArea=676.756 TotalAR=1.96988
  root: chord 20.3244, twist 0, NACA 4-series Camber=0 CamberLoc=0.5 ThickChord=0.04
  sections:
    n  Span     Root_Chord  Tip_Chord  Area     Sweep  Sweep_Location  Dihedral  Twist  Twist_Location  tip airfoil
    1  10.0173  20.3244     18.1561    192.736  54     0               0         0      0               NACA 4-series Camber=0 CamberLoc=0.5 DeltaX=0.118182 ThickChord=0.06
    2  8.23869  18.1561     17.1996    145.642  50     0               0         0      0               NACA 4-series Camber=0 CamberLoc=0.5 DeltaX=0.254545 ThickChord=0.06

Stack "rocket pylon"
  location (X Y Z) 22.2826 0 -5.21739, rotation 0 0 0
  bounding box size 18.1298 3.47392 4
  cross sections:
    n  XDelta   YDelta  ZDelta    shape
    0  0        0       0         point
    1  2.72131  0       0.983607  rounded rectangle RoundRectXSec_Radius=0.566667 RoundRect_Keystone=0.386364 RoundedRect_Height=4 RoundedRect_Width=3
    2  4.86885  0       0         as above
    3  9.85246  0       0         as above
    4  0.5      0       0         point
