OpenVSP model (file version 5), 3 components.
Geometry view with OpenVSP parameter names; values to 6 digits, angles in degrees, lengths in the model's unit.
Overall bounding box: X_Min=0 X_Len=16.4402 Y_Min=-7.24844 Y_Len=14.4969 Z_Min=-0.836957 Z_Len=2.01014

Fuselage "Fuselage"
  location (X Y Z) 0 0 0, rotation 0 0 0
  bounding box size 15 3.64414 2
  Design: Length=15
  cross sections:
    n  XLocPercent  YLocPercent  ZLocPercent  shape
    0  0            0            0            point
    1  0.111413     0            0            edit curve Width=2 Height=1 AbsoluteFlag=0 SymType=1 PCHIP points (X Y): 0.5 0, 0.421644 -0.129452, 0.332877 -0.240411, 0.224384 -0.339041, 0 -0.5, -0.224384 -0.339041, -0.332877 -0.240411, -0.421644 -0.129452, -0.5 0, -0.431507 0.117123, -0.337808 0.25274, -0.175068 0.425342, 0 0.5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
    2  0.340294     0            0            edit curve Width=2.5 Height=1.5 AbsoluteFlag=0 SymType=1 PCHIP points (X Y): 0.5 0, 0.421644 -0.129452, 0.332877 -0.240411, 0.224384 -0.339041, 0 -0.5, -0.224384 -0.339041, -0.332877 -0.240411, -0.421644 -0.129452, -0.5 0, -0.431507 0.117123, -0.337808 0.25274, -0.175068 0.425342, 0 0.5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
    3  0.625        0            0.0108696    edit curve Width=3.5 Height=2 AbsoluteFlag=0 SymType=1 PCHIP points (X Y): 0.5 0, 0.421644 -0.129452, 0.332877 -0.240411, 0.224384 -0.339041, 0 -0.5, -0.224384 -0.339041, -0.332877 -0.240411, -0.421644 -0.129452, -0.5 0, -0.431507 0.117123, -0.337808 0.25274, -0.175068 0.425342, 0 0.5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
    4  0.8125       0            0            edit curve Width=2 Height=1.2 AbsoluteFlag=0 SymType=1 PCHIP points (X Y): 0.5 0, 0.421644 -0.129452, 0.332877 -0.240411, 0.224384 -0.339041, 0 -0.5, -0.224384 -0.339041, -0.332877 -0.240411, -0.421644 -0.129452, -0.5 0, -0.431507 0.117123, -0.337808 0.25274, -0.175068 0.425342, 0 0.5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
    5  1            0            0            point

Wing "Wing"
  location (X Y Z) 4.67391 0.869565 0, rotation 0 -1.08696 7.17391
  symmetric about XZ
  bounding box size 9.97194 14.4969 1.46081
  totals: TotalSpan=10.9384 TotalProjectedSpan=10.6732 TotalChord=3.66348 TotalArea=32.143 TotalAR=3.54408
  root: chord 8.23958, twist 0, NACA 4-series Camber=0 CamberLoc=0.2 DeltaX=-0.309091 ThickChord=0.0681818
  sections:
    n  Span      Root_Chord  Tip_Chord  Area     Sweep    Sweep_Location  Dihedral  Twist  Twist_Location  tip airfoil
    1  0.593751  8.23958     4.69792    3.84083  30       0               0         0      0.25            NACA 4-series Camber=0 CamberLoc=0.2 DeltaX=0.127273 ThickChord=0.1
    2  3.02344   4.69792     1.88628    9.95346  52.0909  0               6.73913   0      0.25            NACA 4-series Camber=0 CamberLoc=0.2 DeltaX=0.572727 ThickChord=0.1
    3  1.852     1.88628     0.572917   2.27722  18.2727  0               20        0      0.25            NACA 4-series Camber=0 CamberLoc=0.2 DeltaX=4.86364 ThickChord=0.1

Wing "Stabilizer"
  location (X Y Z) 12.0652 0.869565 0, rotation 0 0 -17.3696
  symmetric about XZ
  bounding box size 5.25994 5.50923 1.175
  totals: TotalSpan=5.95899 TotalProjectedSpan=5.59962 TotalChord=2.03586 TotalArea=12.1317 TotalAR=2.58461
  root: chord 3, twist 0, NACA 4-series Camber=0 CamberLoc=0.2 DeltaX=-0.309091 ThickChord=0.0681818
  sections:
    n  Span     Root_Chord  Tip_Chord  Area     Sweep  Sweep_Location  Dihedral  Twist  Twist_Location  tip airfoil
    1  2.97949  3           1.07172    6.06584  40     0               20        0      0.25            NACA 4-series Camber=0 CamberLoc=0.2 DeltaX=0.127273 ThickChord=0.1
