OpenVSP model (file version 5), 3 components.
Geometry view with OpenVSP parameter names; values to 6 digits, angles in degrees, lengths in the model's unit.
Overall bounding box: X_Min=-0.0400226 X_Len=0.706944 Y_Min=-0.784692 Y_Len=1.56938 Z_Min=-0.106816 Z_Len=0.194101

Wing "WingGeom"
  location (X Y Z) 0.11 0 -0.01, rotation 0 -2.861 0
  symmetric about XZ
  bounding box size 0.486259 1.56938 0.0661038
  totals: TotalSpan=1.51322 TotalProjectedSpan=1.50901 TotalChord=0.203333 TotalArea=0.36866 TotalAR=6.17671
  root: chord 0.4, twist 0, NACA 4-series Camber=0 CamberLoc=0.2 DeltaX=-0.181818 ThickChord=0.09204
  sections:
    n  Span      Root_Chord  Tip_Chord  Area       Sweep  Sweep_Location  Dihedral  Twist  Twist_Location  tip airfoil
    1  0.36583   0.4         0.25       0.118895   22     0               5         0      0.25            NACA 4-series Camber=0 CamberLoc=0.2 DeltaX=-0.227273 ThickChord=0.04273
    2  0.300782  0.25        0.1275     0.0567725  25     0               -3.8      10     0               NACA 4-series Camber=0 CamberLoc=0.2 ThickChord=0.0681818
    3  0.09      0.1275      0.065      0.0086625  32     0               2         12     0.259091        as above

Fuselage "FuselageGeom", child of "WingGeom"
  location (X Y Z) -0.039 0 -0.05, rotation 0 -3 0
  bounding box size 0.706944 0.194341 0.147036
  Design: Length=0.70689
  cross sections:
    n  XLocPercent  YLocPercent  ZLocPercent  shape
    0  0            0            0            point
    1  0.177718     0            0.02007      rounded rectangle RoundRectXSec_Radius=0.0475784 RoundRect_Keystone=0.616279 RoundedRect_Height=0.1236 RoundedRect_Width=0.14357
    2  0.539548     0            0            general fuselage BotStr=1.12289 BotTanAngle=65 CornerRad=0 Height=0.13636 LowStr=1.23109 MaxWidthLoc=0.542509 TopStr=0.641536 TopTanAngle=100.636 UpStr=0.665455 Width=0.12357
    3  0.712604     0            0            general fuselage BotStr=1.15623 BotTanAngle=70 CornerRad=0 Height=0.08973 LowStr=1.23109 MaxWidthLoc=0.436364 TopStr=0.70569 TopTanAngle=100.636 UpStr=0.77225 Width=0.09357
    4  1            0            0            point

Wing "TailGeom"
  location (X Y Z) 0.55 0.01 0, rotation 0 0 0
  symmetric about XZ
  bounding box size 0.0965742 0.265746 0.0944025
  totals: TotalSpan=0.3 TotalProjectedSpan=0.245746 TotalChord=0.034332 TotalArea=0.0102996 TotalAR=5.86342
  root: chord 0.05822, twist 0, NACA 4-series Camber=0 CamberLoc=0.2 ThickChord=0.244344
  sections:
    n  Span  Root_Chord  Tip_Chord  Area       Sweep  Sweep_Location  Dihedral  Twist  Twist_Location  tip airfoil
    1  0.15  0.05822     0.010444   0.0051498  30     0               35        20     0.25            NACA 4-series Camber=0 CamberLoc=0.2 ThickChord=0.180995
