OpenVSP model (file version 5), 3 components.
Geometry view with OpenVSP parameter names; values to 6 digits, angles in degrees, lengths in the model's unit.
Overall bounding box: X_Min=-0.13 X_Len=0.820642 Y_Min=-0.598045 Y_Len=1.19609 Z_Min=-0.0549007 Z_Len=0.132536

Fuselage "Fuselage"
  location (X Y Z) -0.13 0 0, rotation 0 0 0
  bounding box size 0.8 0.208628 0.108102
  Design: Length=0.8
  cross sections:
    n  XLocPercent  YLocPercent  ZLocPercent  shape
    0  0            0            -0.0178902   point
    1  0.192088     0            0.00330494   edit curve Width=0.18 Height=0.09 AbsoluteFlag=0 SymType=1 cubic Bezier points (X Y): 0.5 0, 0.34726 -0.511644, 0.392466 -0.491096, 0 -0.5, -0.392466 -0.491096, -0.34726 -0.511644, -0.5 0, -0.34726 0.523973, -0.462329 0.499315, 0 0.5, 0.462329 0.499315, 0.34726 0.523973, 0.5 0
    2  0.384176     0            0            edit curve Width=0.2 Height=0.1 AbsoluteFlag=0 SymType=1 cubic Bezier points (X Y): 0.5 0, 0.491096 -0.540411, 0.565068 -0.462329, 0 -0.5, -0.565068 -0.462329, -0.491096 -0.540411, -0.5 0, -0.482877 0.540411, -0.540411 0.491096, 0 0.5, 0.540411 0.491096, 0.482877 0.540411, 0.5 0
    3  0.557432     0            0            edit curve Width=0.18 Height=0.1 AbsoluteFlag=0 SymType=1 cubic Bezier points (X Y): 0.5 0, 0.482877 -0.55274, 0.532192 -0.482877, 0 -0.5, -0.532192 -0.482877, -0.482877 -0.55274, -0.5 0, -0.478767 0.495205, -0.528082 0.478767, 0 0.5, 0.528082 0.478767, 0.478767 0.495205, 0.5 0
    4  0.790678     0            0            edit curve Width=0.1 Height=0.07 AbsoluteFlag=0 SymType=1 cubic Bezier points (X Y): 0.5 0, 0.380137 -0.560959, 0.466438 -0.491096, 0 -0.5, -0.466438 -0.491096, -0.380137 -0.560959, -0.5 0, -0.470548 0.519863, -0.519863 0.495205, 0 0.5, 0.519863 0.495205, 0.470548 0.519863, 0.5 0
    5  1            0            0            point

Wing "Main Wing", child of "Fuselage"
  location (X Y Z) 0 0.07 0, rotation 0 0 -3.04348
  symmetric about XZ
  bounding box size 0.499295 1.19609 0.120133
  totals: TotalSpan=1.1 TotalProjectedSpan=1.07314 TotalChord=0.258767 TotalArea=0.28026 TotalAR=4.10916
  root: chord 0.5, twist 0, NACA 4-series Camber=0 CamberLoc=0.2 DeltaY=-0.00909091 ThickChord=0.163636
  sections:
    n  Span  Root_Chord  Tip_Chord  Area       Sweep  Sweep_Location  Dihedral  Twist      Twist_Location  tip airfoil
    1  0.1   0.5         0.3        0.04       30     0               25.8696   0.454545   0.25            NACA 4-series Camber=0.0200455 CamberLoc=0.2 DeltaX=0.0818182 ThickChord=0.1
    2  0.35  0.3         0.2        0.0875     30     0               0         -0.909091  0.25            NACA 4-series Camber=0.0220909 CamberLoc=0.2 ThickChord=0.1
    3  0.1   0.2         0.0526042  0.0126302  40     0               15        0.454545   0.25            NACA 4-series Camber=0.0216818 CamberLoc=0.2 DeltaX=-0.0727273 ThickChord=0.1

Wing "tail"
  location (X Y Z) 0.543478 0.03 0, rotation 30 -2.6087 -4.23913
  symmetric about XZ
  bounding box size 0.147167 0.304674 0.0818942
  totals: TotalSpan=0.3 TotalProjectedSpan=0.3 TotalChord=0.075 TotalArea=0.0225 TotalAR=4
  root: chord 0.1, twist 0, NACA 4-series Camber=0 CamberLoc=0.2 ThickChord=0.1
  sections:
    n  Span  Root_Chord  Tip_Chord  Area     Sweep  Sweep_Location  Dihedral  Twist  Twist_Location  tip airfoil
    1  0.15  0.1         0.05       0.01125  30     0               0         0      0.25            as above
