OpenVSP model (file version 5), 5 components.
Geometry view with OpenVSP parameter names; values to 6 digits, angles in degrees, lengths in the model's unit.
Overall bounding box: X_Min=-1.32371 X_Len=2.64742 Y_Min=-2.86329 Y_Len=5.72658 Z_Min=-4.69565 Z_Len=6

Fuselage "Fuselage"
  location (X Y Z) 0 0 1.30435, rotation 0 90 0
  bounding box size 1.00412 1.1 6
  Design: Length=6
  cross sections:
    n  XLocPercent  YLocPercent  ZLocPercent  shape
    0  0            0            0            point
    1  0.217391     0            0            general fuselage BotStr=0 BotTanAngle=59.7273 CornerRad=0 Height=0.83 LowStr=1 MaxWidthLoc=0 TopStr=0 TopTanAngle=59.7273 UpStr=1 Width=0.8
    2  0.5          0            0            general fuselage BotStr=0 BotTanAngle=59.7273 CornerRad=0 Height=1 LowStr=1.2 MaxWidthLoc=0 TopStr=0 TopTanAngle=59.7273 UpStr=1.2 Width=1.1
    3  0.877717     0            0            general fuselage BotStr=0 BotTanAngle=59.7273 CornerRad=0 Height=0.9 LowStr=1 MaxWidthLoc=0 TopStr=0 TopTanAngle=59.7273 UpStr=1 Width=0.857727
    4  1            0            0            point

Wing "Wing 1"
  location (X Y Z) -0.1 0 0, rotation 0 90 0
  symmetric about XZ
  bounding box size 1.16007 5.72658 4
  totals: TotalSpan=5.4 TotalProjectedSpan=5.4 TotalChord=1.86667 TotalArea=9.26 TotalAR=3.14903
  root: chord 4, twist 0, NACA 4-series Camber=0 CamberLoc=0.2 DeltaY=-0.08 ThickChord=0.177273
  sections:
    n  Span  Root_Chord  Tip_Chord  Area   Sweep  Sweep_Location  Dihedral  Twist  Twist_Location  tip airfoil
    1  0.5   4           2.5        1.625  30     0               0         0      0.25            NACA 4-series Camber=0 CamberLoc=0.2 DeltaX=0.0909091 DeltaY=-0.036 ThickChord=0.1
    2  1.5   2.5         0.9        2.55   30     0               0         0      0.25            NACA 4-series Camber=0 CamberLoc=0.2 DeltaX=0.218182 DeltaY=-1.2 ThickChord=0.1
    3  0.7   0.9         0.4        0.455  30     0               0         0      0.25            NACA 4-series Camber=0 CamberLoc=0.2 DeltaY=-1.9 ThickChord=0.1

Wing "Wing 2"
  location (X Y Z) 0.1 0 0, rotation 0 90 0
  symmetric about XZ
  bounding box size 1.16007 5.72658 4
  totals: TotalSpan=5.4 TotalProjectedSpan=5.4 TotalChord=1.86667 TotalArea=9.26 TotalAR=3.14903
  root: chord 4, twist 0, NACA 4-series Camber=0 CamberLoc=0.2 DeltaY=0.08 ThickChord=0.177273
  sections:
    n  Span  Root_Chord  Tip_Chord  Area   Sweep  Sweep_Location  Dihedral  Twist  Twist_Location  tip airfoil
    1  0.5   4           2.5        1.625  30     0               0         0      0.25            NACA 4-series Camber=0 CamberLoc=0.2 DeltaX=0.0909091 DeltaY=0.036 ThickChord=0.1
    2  1.5   2.5         0.9        2.55   30     0               0         0      0.25            NACA 4-series Camber=0 CamberLoc=0.2 DeltaX=0.218182 DeltaY=1.2 ThickChord=0.1
    3  0.7   0.9         0.4        0.455  30     0               0         0      0.25            NACA 4-series Camber=0 CamberLoc=0.2 DeltaY=1.9 ThickChord=0.1

Wing "Tail 1"
  location (X Y Z) 0 0.35 -3.15217, rotation 0 90 0
  symmetric about XZ
  bounding box size 0.177483 2.54742 1.40058
  totals: TotalSpan=1.84742 TotalProjectedSpan=1.84742 TotalChord=0.516667 TotalArea=1.08025 TotalAR=3.15943
  root: chord 1, twist 0, NACA 4-series Camber=0 CamberLoc=0.2 ThickChord=0.177273
  sections:
    n  Span       Root_Chord  Tip_Chord  Area        Sweep  Sweep_Location  Dihedral  Twist  Twist_Location  tip airfoil
    1  0.24527    1           0.8        0.220743    30     0               0         0      0.25            NACA 4-series Camber=0 CamberLoc=0.2 ThickChord=0.1
    2  0.621759   0.8         0.2        0.31088     30     0               0         0      0.25            NACA 4-series Camber=0 CamberLoc=0.2 DeltaX=3 ThickChord=0.1
    3  0.0566831  0.2         0.1        0.00850247  0      0               0         0      0.25            NACA 4-series Camber=0 CamberLoc=0.2 DeltaX=8 ThickChord=0.1

Wing "Tail 2"
  location (X Y Z) 0.4 0 -3.152, rotation 90 0 -90
  symmetric about YZ
  bounding box size 2.64742 0.177483 1.40058
  totals: TotalSpan=1.84742 TotalProjectedSpan=1.84742 TotalChord=0.516667 TotalArea=1.08025 TotalAR=3.15943
  root: chord 1, twist 0, NACA 4-series Camber=0 CamberLoc=0.2 ThickChord=0.177273
  sections:
    n  Span       Root_Chord  Tip_Chord  Area        Sweep  Sweep_Location  Dihedral  Twist  Twist_Location  tip airfoil
    1  0.24527    1           0.8        0.220743    30     0               0         0      0.25            NACA 4-series Camber=0 CamberLoc=0.2 ThickChord=0.1
    2  0.621759   0.8         0.2        0.31088     30     0               0         0      0.25            NACA 4-series Camber=0 CamberLoc=0.2 DeltaX=3 ThickChord=0.1
    3  0.0566831  0.2         0.1        0.00850247  0      0               0         0      0.25            NACA 4-series Camber=0 CamberLoc=0.2 DeltaX=8 ThickChord=0.1
