OpenVSP model (file version 5), 4 components.
Geometry view with OpenVSP parameter names; values to 6 digits, angles in degrees, lengths in the model's unit.
Overall bounding box: X_Min=-5.1087 X_Len=35.9276 Y_Min=-19.5814 Y_Len=39.1629 Z_Min=-1.90981 Z_Len=7.90981

Wing "main wing"
  location (X Y Z) -4.05405 0 0, rotation 0 0 0
  symmetric about XZ
  bounding box size 8.8123 39.1629 1.67655
  totals: TotalSpan=39.3701 TotalProjectedSpan=39.1629 TotalChord=3.3853 TotalArea=146.027 TotalAR=10.5031
  root: chord 5.58549, twist 0, NACA 4-series Camber=0.0126244 CamberLoc=0.2 DeltaX=1.86652 DeltaY=0.21267 ThickChord=0.1
  sections:
    n  Span     Root_Chord  Tip_Chord  Area     Sweep  Sweep_Location  Dihedral  Twist  Twist_Location  tip airfoil
    1  12.865   5.58549     3.29391    57.1168  30     0               0         0      0.25            NACA 4-series Camber=0.00773756 CamberLoc=0.2 DeltaX=0.420814 ThickChord=0.1
    2  6.82005  3.29391     1.36788    15.8968  0      0               10        0      0.25            NACA 4-series Camber=0.00162896 CamberLoc=0.2 DeltaX=-0.167421 ThickChord=0.1

Fuselage "Fuselage", child of "main wing"
  location (X Y Z) -5.1087 0 0, rotation 0 0 0
  bounding box size 35.9276 3.81962 3.81962
  Design: Length=35.9276
  cross sections:
    n  XLocPercent  YLocPercent  ZLocPercent  shape
    0  0            0            0            point
    1  0.296196     0            0            ellipse Ellipse_Height=3.52171 Ellipse_Width=3.72668
    2  0.681829     0            0            ellipse Ellipse_Height=1.76463 Ellipse_Width=2.16662
    3  0.817935     0            0            ellipse Ellipse_Height=1.41818 Ellipse_Width=1.86652
    4  1            0            0            point

Wing "horizontal stabilizer"
  location (X Y Z) 21.5 0 5.5, rotation 0 0 0
  symmetric about XZ
  bounding box size 4.0001 14.0513 0.400248
  totals: TotalSpan=14.0513 TotalProjectedSpan=14.0513 TotalChord=3.65285 TotalArea=51.3272 TotalAR=3.84666
  root: chord 4, twist 0, NACA 4-series Camber=0.0061086 CamberLoc=0.2 DeltaX=1 ThickChord=0.1
  sections:
    n  Span     Root_Chord  Tip_Chord  Area     Sweep  Sweep_Location  Dihedral  Twist  Twist_Location  tip airfoil
    1  7.02564  4           3.3057     25.6636  30     0               0         0      0.25            NACA 4-series Camber=0 CamberLoc=0.2 ThickChord=0.1

Wing "vertical stabilizer", child of "horizontal stabilizer"
  location (X Y Z) 22.5 0 0, rotation 90 0 0
  bounding box size 5.4494 0.486292 6
  totals: TotalSpan=6 TotalProjectedSpan=6 TotalChord=4.22539 TotalArea=25.3523 TotalAR=1.41999
  root: chord 4.8601, twist 0, NACA 4-series Camber=0 CamberLoc=0.2 DeltaX=0.330317 ThickChord=0.1
  sections:
    n  Span  Root_Chord  Tip_Chord  Area     Sweep  Sweep_Location  Dihedral  Twist  Twist_Location  tip airfoil
    1  6     4.8601      3.59067    25.3523  30     0               0         0      0.25            NACA 4-series Camber=0 CamberLoc=0.2 ThickChord=0.1
