OpenVSP model (file version 5), 9 components.
Geometry view with OpenVSP parameter names; values to 6 digits, angles in degrees, lengths in the model's unit.
Overall bounding box: X_Min=-9.8913 X_Len=42.1778 Y_Min=-7.77141 Y_Len=15.5428 Z_Min=-2.26697 Z_Len=6.75124

Blank "space plane"
  location (X Y Z) 0.47619 0.0238095 0, rotation 0 0 0

Fuselage "Fuselage", child of "space plane"
  location (X Y Z) -9.8913 0 0.434783, rotation 0 0 0
  bounding box size 40.8228 5.37748 4.36097
  Design: Length=40.6364
  cross sections:
    n  XLocPercent  YLocPercent  ZLocPercent  shape
    0  0            0            -0.02        edit curve Width=0 Height=0 AbsoluteFlag=0 SymType=0 cubic Bezier points (X Y): 0 0, 0 0, 0 0, 0 0, 0 0, 0 0, 0 0
    1  0.0127768    0            -0.0189039   circle Circle_Diameter=0.42878
    2  0.0671694    0            -0.0202188   circle Circle_Diameter=2.05027
    3  0.431771     0            0            edit curve Width=3.47107 Height=3 AbsoluteFlag=0 SymType=1 cubic Bezier points (X Y): 0.569022 -0.128279, 0.575543 -0.928135, 0.478767 -0.864655, 0 -0.863014, -0.478767 -0.864655, -0.575543 -0.928135, -0.569022 -0.128279, -0.321196 0.645167, -0.466438 0.510169, 0 0.524434, 0.466438 0.510169, 0.321196 0.645167, 0.569022 -0.128279
    4  0.443907     0            0            edit curve Width=3.47107 Height=3 AbsoluteFlag=0 SymType=1 cubic Bezier points (X Y): 0.569022 -0.128279, 0.575543 -0.928135, 0.478767 -0.884502, 0 -0.88286, -0.478767 -0.884502, -0.575543 -0.928135, -0.569022 -0.128279, -0.321196 0.645167, -0.466438 0.510169, 0 0.524434, 0.466438 0.510169, 0.321196 0.645167, 0.569022 -0.128279
    5  0.99         0            0            edit curve Width=3.47107 Height=3 AbsoluteFlag=0 SymType=1 cubic Bezier points (X Y): 0.729452 -0.204461, 0.725342 -0.789313, 0.819863 -0.660931, 0 -0.668063, -0.819863 -0.660931, -0.725342 -0.789313, -0.729452 -0.204461, -0.725342 0.342353, -0.75 0.254387, 0 0.247255, 0.75 0.254387, 0.725342 0.342353, 0.729452 -0.204461
    6  1            0            0            point

Wing "horizontal stabilizer"
  location (X Y Z) 24 2.3913 -0.108696, rotation 0 0.434783 0
  symmetric about XZ
  bounding box size 4.08584 11.3489 0.424358
  totals: TotalSpan=6.57032 TotalProjectedSpan=6.56634 TotalChord=3.25334 TotalArea=19.3946 TotalAR=2.22314
  root: chord 4.08594, twist 0, NACA 4-series Camber=0 CamberLoc=0.2 DeltaX=0.536364 ThickChord=0.1
  sections:
    n  Span      Root_Chord  Tip_Chord  Area     Sweep  Sweep_Location  Dihedral  Twist  Twist_Location  tip airfoil
    1  0.593751  4.08594     3.36507    2.21202  30     0               -0.76087  0      0.25            NACA 4-series Camber=0 CamberLoc=0.2 DeltaX=0.63 ThickChord=0.1
    2  2.69141   3.36507     2.19727    7.48526  40     0               -2.17391  0      0.25            NACA 4-series Camber=0 CamberLoc=0.2 DeltaX=0.0363636 ThickChord=0.1

Wing "Main Wing"
  location (X Y Z) 16.7391 0 -1.847, rotation 0 -1.08713 0
  symmetric about XZ
  bounding box size 17.2792 15.5428 1.16022
  totals: TotalSpan=15.8383 TotalProjectedSpan=15.5428 TotalChord=9.1906 TotalArea=155.241 TotalAR=1.55615
  root: chord 17.2813, twist 0, NACA 63-series A=0.48636 DeltaX=-0.509091 IdealCl=0.26818 ThickChord=0.05909
  sections:
    n  Span     Root_Chord  Tip_Chord  Area     Sweep    Sweep_Location  Dihedral  Twist  Twist_Location  tip airfoil
    1  1.69919  17.2813     13.6193    26.2529  30       0               0         0      0.25            as above
    2  5.18869  13.6193     5.07842    48.5082  30       0               -3.47826  0      0.25            NACA 63-series A=0.48636 DeltaX=-0.636364 IdealCl=0.26818 ThickChord=0.05909
    3  1.03125  5.07842     0.466933   2.85932  22.4545  0               30        0      0.25            NACA 63-series A=1 DeltaX=-1.48182 IdealCl=0 ThickChord=0.1

Stack "nozzle"
  location (X Y Z) 29.5652 0 -0.217391, rotation 0 0 0
  bounding box size 2.72131 4.11411 2.26428
  cross sections:
    n  XDelta   YDelta  ZDelta  shape
    0  0        0       0       point
    1  1        0       0       edit curve Width=4.07727 Height=2.21591 AbsoluteFlag=0 SymType=1 cubic Bezier points (X Y): 0.5 0, 0.497283 -0.612, 0.559239 -0.522, 0 -0.5, -0.559239 -0.522, -0.497283 -0.612, -0.5 0, -0.497283 0.57, -0.588587 0.498, 0 0.5, 0.588587 0.498, 0.497283 0.57, 0.5 0
    2  1.72131  0       0       rounded rectangle RoundRectXSec_Radius=0.0852273 RoundedRect_Height=0.554752 RoundedRect_Width=1.95

Stack "StackGeom"
  location (X Y Z) 30.05 0 -0.217391, rotation 0 0 0
  bounding box size 0.822835 5.00189 2.5616
  cross sections:
    n  XDelta    YDelta  ZDelta  shape
    0  0         0       0       point
    1  0.418033  0       0       rounded rectangle RoundRectXSec_Radius=0.363636 RoundedRect_Height=2.42541 RoundedRect_Width=4.8657
    2  0.245902  0       0       rounded rectangle RoundRectXSec_Radius=0.363636 RoundedRect_Height=2.40909 RoundedRect_Width=4.27273

Wing "vertical  stabilizer top"
  location (X Y Z) 24.2174 0 1.30435, rotation 90 0 -2.17391
  bounding box size 4.39869 0.440441 3.40458
  totals: TotalSpan=3.28516 TotalProjectedSpan=3.28516 TotalChord=3.54533 TotalArea=10.9377 TotalAR=0.986705
  root: chord 4.40186, twist 0, NACA 4-series Camber=0 CamberLoc=0.2 DeltaX=0.345455 ThickChord=0.1
  sections:
    n  Span      Root_Chord  Tip_Chord  Area     Sweep  Sweep_Location  Dihedral  Twist  Twist_Location  tip airfoil
    1  0.593751  4.40186     3.36507    2.30581  30     0               0         0      0.25            NACA 4-series Camber=0 CamberLoc=0.2 DeltaX=0.63 ThickChord=0.1
    2  2.69141   3.36507     3.04932    8.63186  40     0               0         0      0.25            NACA 4-series Camber=0 CamberLoc=0.2 DeltaX=0.0363636 ThickChord=0.1

Wing "vertical  stabilizer"
  location (X Y Z) 24.2174 0 -1.304, rotation -90 0 -2.17391
  bounding box size 4.53831 0.440441 1.06101
  totals: TotalSpan=0.937989 TotalProjectedSpan=0.937989 TotalChord=3.88346 TotalArea=3.64265 TotalAR=0.241534
  root: chord 4.40186, twist 0, NACA 4-series Camber=0 CamberLoc=0.2 DeltaX=0.345455 ThickChord=0.1
  sections:
    n  Span      Root_Chord  Tip_Chord  Area     Sweep  Sweep_Location  Dihedral  Twist  Twist_Location  tip airfoil
    1  0.937989  4.40186     3.36507    3.64265  30     0               0         0      0.25            NACA 4-series Camber=0 CamberLoc=0.2 DeltaX=0.63 ThickChord=0.1

Wing "WingGeom"
  location (X Y Z) -0.434783 0.869565 -0.217391, rotation 0 -2.3913 6.30435
  symmetric about XZ
  bounding box size 3.76556 3.94805 0.397088
  totals: TotalSpan=1.38542 TotalProjectedSpan=1.38542 TotalChord=1.89583 TotalArea=2.62652 TotalAR=0.73077
  root: chord 3.79167, twist 0, NACA 4-series Camber=0 CamberLoc=0.2 ThickChord=0.1
  sections:
    n  Span      Root_Chord  Tip_Chord  Area     Sweep    Sweep_Location  Dihedral  Twist  Twist_Location  tip airfoil
    1  0.692709  3.79167     0          1.31326  79.6364  0               0         0      0.25            NACA 4-series Camber=0 CamberLoc=0.2 DeltaX=0.8 ThickChord=0.1
