OpenVSP model (file version 5), 3 components.
Geometry view with OpenVSP parameter names; values to 6 digits, angles in degrees, lengths in the model's unit.
Overall bounding box: X_Min=0 X_Len=59.2405 Y_Min=-44.6685 Y_Len=89.337 Z_Min=-1.83141 Z_Len=9.76324

Fuselage "Fuselage"
  location (X Y Z) 0 0 0, rotation 0 0 0
  bounding box size 55 6.32453 7.32881
  Design: Length=55
  cross sections:
    n  XLocPercent  YLocPercent  ZLocPercent  shape
    0  0            0            0            point
    1  0.173333     0            0.0335099    rounded rectangle RoundRectXSec_Radius=1.64138 RoundedRect_Height=7 RoundedRect_Width=6
    2  0.399708     0            0.027027     rounded rectangle RoundRectXSec_Radius=1.7 RoundedRect_Height=6 RoundedRect_Width=4
    3  0.666032     0            0.000182615  rounded rectangle RoundRectXSec_Radius=0.703448 RoundedRect_Height=3 RoundedRect_Width=3
    4  0.894357     0            -0.0135135   rounded rectangle RoundRectXSec_Radius=0.70345 RoundedRect_Height=2 RoundedRect_Width=2
    5  1            0            -0.0135135   point

Wing "Main wing"
  location (X Y Z) 16.087 0 -0.652174, rotation 0 0 -10
  symmetric about XZ
  bounding box size 10.7961 89.337 3.68207
  totals: TotalSpan=88 TotalProjectedSpan=87.7966 TotalChord=7.57775 TotalArea=666.842 TotalAR=11.5593
  root: chord 10.4271, twist 0, NACA 4-series Camber=0.0760909 CamberLoc=0.416364 ThickChord=0.272727
  sections:
    n  Span  Root_Chord  Tip_Chord  Area     Sweep    Sweep_Location  Dihedral  Twist  Twist_Location  tip airfoil
    1  22    10.4271     8.29289    205.92   6.90909  0               5.1087    0      0.25            NACA 4-series Camber=0 CamberLoc=0.2 DeltaX=-0.672727 ThickChord=0.1
    2  22    8.29289     3.29812    127.501  20       0               2.06522   0      0.25            NACA 4-series Camber=0 CamberLoc=0.2 DeltaX=-5.74545 ThickChord=0.1

Wing "stabilizers"
  location (X Y Z) 45 0 -1.30435, rotation 35 0 0
  symmetric about XZ
  bounding box size 14.2405 26.0736 9.54098
  totals: TotalSpan=31.4688 TotalProjectedSpan=31.4688 TotalChord=6.29688 TotalArea=198.155 TotalAR=4.99752
  root: chord 7.4375, twist 0, NACA 4-series Camber=0 CamberLoc=0.2 ThickChord=0.1
  sections:
    n  Span     Root_Chord  Tip_Chord  Area     Sweep  Sweep_Location  Dihedral  Twist  Twist_Location  tip airfoil
    1  15.7344  7.4375      5.15625    99.0774  30     0               0         0      0.25            as above
