OpenVSP model (file version 5), 4 components.
Geometry view with OpenVSP parameter names; values to 6 digits, angles in degrees, lengths in the model's unit.
Overall bounding box: X_Min=0 X_Len=4 Y_Min=-2.78 Y_Len=5.56 Z_Min=-0.43579 Z_Len=1.41983

Wing "Main wing"
  location (X Y Z) 1.30435 0.28 0, rotation 0 0 0
  symmetric about XZ
  bounding box size 1.42155 5.56 0.154309
  totals: TotalSpan=5 TotalProjectedSpan=5 TotalChord=0.860775 TotalArea=4.30387 TotalAR=5.80872
  root: chord 1.42155, twist 0, NACA 4-series Camber=0 CamberLoc=0.2 ThickChord=0.1
  sections:
    n  Span  Root_Chord  Tip_Chord  Area     Sweep  Sweep_Location  Dihedral  Twist  Twist_Location  tip airfoil
    1  2.5   1.42155     0.3        2.15194  16     0               0         0      0.25            NACA 4-series Camber=0 CamberLoc=0.2 DeltaX=0.00909091 DeltaY=0.227273 ThickChord=0.1

Fuselage "Fuselage"
  location (X Y Z) 0 0 0, rotation 0 0 0
  bounding box size 4 0.7 0.7
  Design: Length=4
  cross sections:
    n  XLocPercent  YLocPercent  ZLocPercent  shape
    0  0            0            -0.0326087   point
    1  0.201087     0            0            circle Circle_Diameter=0.7
    2  0.5          0            0            as above
    3  0.894022     0            0            as above
    4  1            0            0            circle Circle_Diameter=0.4

Wing "Stabilizers"
  location (X Y Z) 3.15217 0.28 0.217391, rotation 40 0 0
  symmetric about XZ
  bounding box size 0.515625 2.22978 0.786414
  totals: TotalSpan=2.24357 TotalProjectedSpan=2.24357 TotalChord=0.365104 TotalArea=0.819138 TotalAR=6.14502
  root: chord 0.515625, twist 0, NACA 4-series Camber=0 CamberLoc=0.2 ThickChord=0.1
  sections:
    n  Span     Root_Chord  Tip_Chord  Area      Sweep    Sweep_Location  Dihedral  Twist  Twist_Location  tip airfoil
    1  1.12179  0.515625    0.214583   0.409569  8.72727  0               0         0      0.25            NACA 4-series Camber=0 CamberLoc=0.2 DeltaX=0.00909091 DeltaY=0.227273 ThickChord=0.1

Wing "Vertical Stabilizers"
  location (X Y Z) 3.2 0 -0.326087, rotation -90 0 0
  bounding box size 0.458333 0.0458599 0.109703
  totals: TotalSpan=0.109703 TotalProjectedSpan=0.109703 TotalChord=0.379167 TotalArea=0.0415956 TotalAR=0.289326
  root: chord 0.458333, twist 0, NACA 4-series Camber=0 CamberLoc=0.2 ThickChord=0.1
  sections:
    n  Span      Root_Chord  Tip_Chord  Area       Sweep  Sweep_Location  Dihedral  Twist  Twist_Location  tip airfoil
    1  0.109703  0.458333    0.3        0.0415956  33     0               0         0      0.25            NACA 4-series Camber=0 CamberLoc=0.2 DeltaX=0.00909091 ThickChord=0.1
